// COMSOL Multiphysics 5.4.0.225 model "Motor.mph"
// Outline of the model tree

Parameters
  alpha = pi/18
  beta = pi/18/4
  d = 1[mm]
  D1 = 72[mm]
  D2 = 110[mm]
  D3 = D1-(2*d)
  Dh = 22[mm]
  L = 81[mm]
  mur = 700
  phi0 = -(pi/2)/6 + beta
  tol = 3[mm]
  S = 1.0271E2
  Im = 4*sqrt(2)
  w0 = 2*pi*50
  t = 0
  Ia = Im*cos(w0*t)
  Ib = Im*cos(w0*t - 2*pi/3)
  Ic = Im*cos(w0*t + 2*pi/3)
  N = 470
  Ja = (N*Ia)*S
  Jb = (N*Ib)*S
  Jc = (N*Ic)*S
  Dc = 10[mm]

Geometry
  geom1 "Geometry 1" (2D, length unit m)
    c1: Circle | r = D2/2; angle = 90
    c2: Circle | r = D1/2; angle = 90
    c3: Circle | r = D3/2; angle = 90
    c4: Circle | r = Dh/2; angle = 90
    pol1: Polygon
      source = table
      table = 
        {(D1/2+tol)*cos(phi0 + pi/2), (D1/2+tol)*sin(phi0 + pi/2)}
        {(D1/2+tol)*cos(phi0 + pi/2 + alpha), (D1/2+tol)*sin(phi0 + pi/2 + alpha)}
        {(D2/2-tol)*cos(phi0 + pi/2 + alpha), (D2/2-tol)*sin(phi0 + pi/2 + alpha)}
        {(D2/2-tol)*cos(phi0 + pi/2), (D2/2-tol)*sin(phi0 + pi/2)}
    rot1: Rotate | input = pol1; rot = range(0,-15,-75)
    fin: Finalize "Form Union"

Materials
  mat1: Common "Air" on all domains
    def "Basic"
      relpermeability = 1
      electricconductivity = 0
      relpermittivity = 0
  mat2: Common "Fe" on domains 1, 2, 4
    def "Basic"
      relpermeability = mur
      electricconductivity = 0
      relpermittivity = 0

Physics
  mf: InductionCurrents "Magnetic Fields" on all domains
    dependent variable A = {Ax, Ay, Az}
    al1: AmperesLaw "Ampère's Law 1" (default)
    mi1: MagneticInsulation (default)
    init1: init "Initial Values 1" (default)
    pmc1: PerfectMagneticConductor (disabled) on boundaries 1-5, 10, 24, 25
    ecd1: ExternalCurrentDensity "Ja" on domains 5, 6 | Je = {0, 0, Ja}
    ecd2: ExternalCurrentDensity "-Jc" on domains 7, 8 | Je = {0, 0, -Jc}
    ecd3: ExternalCurrentDensity "Jb" on domains 9, 10 | Je = {0, 0, Jb}
    pc1: PeriodicCondition on boundaries 1-5, 10, 24, 25
      PeriodicType = AntiPeriodicity
      destinationDomains: boundaries 2, 10, 24, 25
    pmc2: PerfectMagneticConductor (disabled) on boundaries 1-5, 10, 24, 25

Mesh
  mesh1 "Mesh 1" (physics-controlled)
    size: MeshSizeDefault | hauto = 2

Studies
  std1 "Study 1"
    stat: Stationary

Solver configurations
  sol1 "Solution 1" (study std1)
    v1: Variables "Dependent Variables 1"
    s1: Stationary "Stationary Solver 1"
      dDef: Direct
      fc1: FullyCoupled | linsolver = dDef

Datasets
  dset1: Solution | solution = sol1
  cln1: CutLine2D | data = dset1; genpoints = {{0.015, 0}, {0.015, 0.015}}
  cln2: CutLine2D | data = dset1; genpoints = {{0, 0.015}, {0.015, 0.015}}

Plots
  pg1: PlotGroup2D "2D Plot Group 1" | data = dset1
    surf1: Surface | expr = mf.Az
    con1: Contour | expr = mf.Az
  pg2: PlotGroup1D "1D Plot Group 2" | data = dset1
    lngr1: LineGraph on boundaries 2, 10, 24, 25 | expr = mf.Az
    lngr2: LineGraph on boundaries 1, 3-5 | expr = mf.Az
  pg3: PlotGroup1D "1D Plot Group 3" | data = dset1
    lngr1: LineGraph | data = cln1; expr = mf.Az
    lngr2: LineGraph | data = cln2; expr = mf.Az